A := [-12.71, -16.88, -18.65; -15.36, -19.13, -12.70; 7.78, -3.76, -28.76]
V1 := [-36.13; 5.98; -30.44]
V2 := [-18.25; -17.03; -33.39]
B := [-34.83, -34.69, -8.27; -39.39, 1.43, -23.36; -32.05, -32.49, -32.89]
C1 := A + B = [-47.54, -51.57, -26.92; -54.75, -17.7, -36.06; -24.27, -36.25, -61.65]
C2 := A*B = [1705.32, 1022.71, 1112.83; 1695.55, 918.105, 991.607; 798.887, 659.147, 969.409]
D := A*V1 = [925.976; 827.147; 571.878]
p := transpose(V1)*A*V2 = -61964
q := transpose(V1)*V2 = 1573.92
Vc1 := [-0.43; -35.70; -12.71]
Vc2 := [-16.88; -18.65; -15.36]
Vc1×Vc2 = [311.31; 207.94; -594.596]
Vc1*Vc2 = 868.289
|Vc1| = 37.8975
|Vc2| = 29.4735
ϕ := Vc1*Vc2/(|Vc1|*|Vc2|) = 0.77736
φ := -28.76
Θ := -34.83
ρ := -3.76
Given
x := ρ*cos(φ)*sin(Θ)
y := p*sin(φ)*cos(Θ)
z := ρ*cos(Θ)
[xval; yval; zval] := Find(x, y, z) = [0.894885; 27857.5; 3.62128]
